*Heading
** Job name: Job-1 Model name: Model-1
** Generated by: Abaqus/CAE 2020
*Preprint, echo=NO, model=NO, history=NO, contact=NO
**
** PARTS
**
*Part, name=Part-Con1
*End Part
**
*Part, name=Part-Con2
*End Part
**
*Part, name=Part-Con3
*End Part
**
*Part, name=Part-Con4
*End Part
**
*Part, name=Part-Con5
*End Part
**
*Part, name=Part-Cow1
*End Part
**
*Part, name=Part-Cow2
*End Part
**
*Part, name=Part-Cow3
*End Part
**
*Part, name=Part-Cow4
*End Part
**
*Part, name=Part-Cow5
*End Part
**
*Part, name=Part-Ins1
*End Part
**
*Part, name=Part-Ins2
*End Part
**
*Part, name=Part-Ins3
*End Part
**
*Part, name=Part-Ins4
*End Part
**
*Part, name=Part-Ins5
*End Part
**
**
** ASSEMBLY
**
*Assembly, name=Assembly
**
*Instance, name=AssemblyInstance-Con1, part=Part-Con1
*Node
      1,  0.430000007,           0.
      2,  0.430040002,           0.
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*Element, type=CAX4R
 1,  1,  2,  6,  5
 2,  2,  3,  7,  6
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*Nset, nset=_PickedSet2, internal, generate
  1,  84,   1
*Elset, elset=_PickedSet2, internal, generate
  1,  60,   1
** Section: Section-Con
*Solid Section, elset=_PickedSet2, material=Material-Con
,
*End Instance
**
*Instance, name=AssemblyInstanceCow1, part=Part-Cow1
*Node
      1,  0.430119991,           0.
      2,  0.430196673,           0.
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*Element, type=CAX4R
 1,  1,  2,  6,  5
 2,  2,  3,  7,  6
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*Nset, nset=_PickedSet2, internal, generate
  1,  72,   1
*Elset, elset=_PickedSet2, internal, generate
  1,  51,   1
** Section: Section-Cow
*Solid Section, elset=_PickedSet2, material=Material-Cow
,
*End Instance
**
*Instance, name=AssemblyInstanceIns1, part=Part-Ins1
*Node
      1,  0.430350006,           0.
      2,  0.430353343,           0.
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*Element, type=CAX4R
 1,  1,  2,  6,  5
 2,  2,  3,  7,  6
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*Nset, nset=_PickedSet2, internal, generate
  1,  84,   1
*Elset, elset=_PickedSet2, internal, generate
  1,  60,   1
** Section: Section-Ins
*Solid Section, elset=_PickedSet2, material=Material-Ins
,
*End Instance
**
*Instance, name=AssemblyInstanceCon2, part=Part-Con2
*Node
      1,  0.430359989,           0.
      2,  0.430400014,           0.
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*Element, type=CAX4R
 1,  1,  2,  6,  5
 2,  2,  3,  7,  6
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*Nset, nset=_PickedSet2, internal, generate
  1,  84,   1
*Elset, elset=_PickedSet2, internal, generate
  1,  60,   1
** Section: Section-Con
*Solid Section, elset=_PickedSet2, material=Material-Con
,
*End Instance
**
*Instance, name=AssemblyInstanceCow2, part=Part-Cow2
*Node
      1,  0.430480003,           0.
      2,  0.430556655,           0.
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*Element, type=CAX4R
 1,  1,  2,  6,  5
 2,  2,  3,  7,  6
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*Nset, nset=_PickedSet2, internal, generate
  1,  72,   1
*Elset, elset=_PickedSet2, internal, generate
  1,  51,   1
** Section: Section-Cow
*Solid Section, elset=_PickedSet2, material=Material-Cow
,
*End Instance
**
*Instance, name=AssemblyInstanceIns2, part=Part-Ins2
*Node
      1,  0.430709988,           0.
      2,  0.430713326,           0.
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*Element, type=CAX4R
 1,  1,  2,  6,  5
 2,  2,  3,  7,  6
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*Nset, nset=_PickedSet2, internal, generate
  1,  84,   1
*Elset, elset=_PickedSet2, internal, generate
  1,  60,   1
** Section: Section-Ins
*Solid Section, elset=_PickedSet2, material=Material-Ins
,
*End Instance
**
*Instance, name=AssemblyInstanceCon3, part=Part-Con3
*Node
      1,  0.430720001,           0.
      2,  0.430759996,           0.
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*Element, type=CAX4R
 1,  1,  2,  6,  5
 2,  2,  3,  7,  6
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*Nset, nset=_PickedSet2, internal, generate
  1,  84,   1
*Elset, elset=_PickedSet2, internal, generate
  1,  60,   1
** Section: Section-Con
*Solid Section, elset=_PickedSet2, material=Material-Con
,
*End Instance
**
*Instance, name=AssemblyInstanceCow3, part=Part-Cow3
*Node
      1,  0.430839986,           0.
      2,  0.430916667,           0.
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*Element, type=CAX4R
 1,  1,  2,  6,  5
 2,  2,  3,  7,  6
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*Nset, nset=_PickedSet2, internal, generate
  1,  72,   1
*Elset, elset=_PickedSet2, internal, generate
  1,  51,   1
** Section: Section-Cow
*Solid Section, elset=_PickedSet2, material=Material-Cow
,
*End Instance
**
*Instance, name=AssemblyInstanceIns3, part=Part-Ins3
*Node
      1,      0.43107,           0.
      2,  0.431080014,           0.
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*Element, type=CAX4R
 1,  1,  2,  4,  3
 2,  3,  4,  6,  5
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*Nset, nset=_PickedSet2, internal, generate
  1,  42,   1
*Elset, elset=_PickedSet2, internal, generate
  1,  20,   1
** Section: Section-Ins
*Solid Section, elset=_PickedSet2, material=Material-Ins
,
*End Instance
**
*Instance, name=AssemblyInstanceCon4, part=Part-Con4
*Node
      1,  0.431080014,           0.
      2,  0.431120008,           0.
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*Element, type=CAX4R
 1,  1,  2,  6,  5
 2,  2,  3,  7,  6
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*Nset, nset=_PickedSet2, internal, generate
  1,  84,   1
*Elset, elset=_PickedSet2, internal, generate
  1,  60,   1
** Section: Section-Con
*Solid Section, elset=_PickedSet2, material=Material-Con
,
*End Instance
**
*Instance, name=AssemblyInstanceCow4, part=Part-Cow4
*Node
      1,  0.431199998,           0.
      2,  0.431276679,           0.
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*Element, type=CAX4R
 1,  1,  2,  6,  5
 2,  2,  3,  7,  6
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*Nset, nset=_PickedSet2, internal, generate
  1,  72,   1
*Elset, elset=_PickedSet2, internal, generate
  1,  51,   1
** Section: Section-Cow
*Solid Section, elset=_PickedSet2, material=Material-Cow
,
*End Instance
**
*Instance, name=AssemblyInstanceIns4, part=Part-Ins4
*Node
      1,  0.431430012,           0.
      2,  0.431439996,           0.
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*Element, type=CAX4R
 1,  1,  2,  4,  3
 2,  3,  4,  6,  5
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*Nset, nset=_PickedSet2, internal, generate
  1,  42,   1
*Elset, elset=_PickedSet2, internal, generate
  1,  20,   1
** Section: Section-Ins
*Solid Section, elset=_PickedSet2, material=Material-Ins
,
*End Instance
**
*Instance, name=AssemblyInstanceCon5, part=Part-Con5
*Node
      1,  0.431439996,           0.
      2,   0.43147999,           0.
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*Element, type=CAX4R
 1,  1,  2,  6,  5
 2,  2,  3,  7,  6
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*Nset, nset=_PickedSet2, internal, generate
  1,  84,   1
*Elset, elset=_PickedSet2, internal, generate
  1,  60,   1
** Section: Section-Con
*Solid Section, elset=_PickedSet2, material=Material-Con
,
*End Instance
**
*Instance, name=AssemblyInstanceCow5, part=Part-Cow5
*Node
      1,   0.43156001,           0.
      2,  0.431636661,           0.
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*Element, type=CAX4R
 1,  1,  2,  6,  5
 2,  2,  3,  7,  6
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*Nset, nset=_PickedSet2, internal, generate
  1,  72,   1
*Elset, elset=_PickedSet2, internal, generate
  1,  51,   1
** Section: Section-Cow
*Solid Section, elset=_PickedSet2, material=Material-Cow
,
*End Instance
**
*Instance, name=AssemblyInstanceIns5, part=Part-Ins5
*Node
      1,  0.431789994,           0.
      2,  0.431800008,           0.
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*Element, type=CAX4R
 1,  1,  2,  4,  3
 2,  3,  4,  6,  5
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*Nset, nset=_PickedSet2, internal, generate
  1,  42,   1
*Elset, elset=_PickedSet2, internal, generate
  1,  20,   1
** Section: Section-Ins
*Solid Section, elset=_PickedSet2, material=Material-Ins
,
*End Instance
**
*Nset, nset=Set-Bc, instance=AssemblyInstance-Con1, generate
 1,  4,  1
*Nset, nset=Set-Bc, instance=AssemblyInstanceCow1, generate
 1,  4,  1
*Nset, nset=Set-Bc, instance=AssemblyInstanceIns1, generate
 1,  4,  1
*Nset, nset=Set-Bc, instance=AssemblyInstanceCow2, generate
 1,  4,  1
*Nset, nset=Set-Bc, instance=AssemblyInstanceIns3
 1, 2
*Nset, nset=Set-Bc, instance=AssemblyInstanceCon5, generate
 1,  4,  1
*Nset, nset=Set-Bc, instance=AssemblyInstanceCon3, generate
 1,  4,  1
*Nset, nset=Set-Bc, instance=AssemblyInstanceCow4, generate
 1,  4,  1
*Nset, nset=Set-Bc, instance=AssemblyInstanceIns5
 1, 2
*Nset, nset=Set-Bc, instance=AssemblyInstanceCon2, generate
 1,  4,  1
*Nset, nset=Set-Bc, instance=AssemblyInstanceIns2, generate
 1,  4,  1
*Nset, nset=Set-Bc, instance=AssemblyInstanceCon4, generate
 1,  4,  1
*Nset, nset=Set-Bc, instance=AssemblyInstanceCow5, generate
 1,  4,  1
*Nset, nset=Set-Bc, instance=AssemblyInstanceCow3, generate
 1,  4,  1
*Nset, nset=Set-Bc, instance=AssemblyInstanceIns4
 1, 2
*Elset, elset=Set-Bc, instance=AssemblyInstance-Con1, generate
 1,  3,  1
*Elset, elset=Set-Bc, instance=AssemblyInstanceCow1, generate
 1,  3,  1
*Elset, elset=Set-Bc, instance=AssemblyInstanceIns1, generate
 1,  3,  1
*Elset, elset=Set-Bc, instance=AssemblyInstanceCow2, generate
 1,  3,  1
*Elset, elset=Set-Bc, instance=AssemblyInstanceIns3
 1,
*Elset, elset=Set-Bc, instance=AssemblyInstanceCon5, generate
 1,  3,  1
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*Elset, elset=_m_Surf-Master_S4, internal, instance=AssemblyInstance-Con1, generate
  1,  58,   3
*Elset, elset=_m_Surf-Master_S4, internal, instance=AssemblyInstanceCow1, generate
  1,  49,   3
*Elset, elset=_m_Surf-Master_S4, internal, instance=AssemblyInstanceCow2, generate
  1,  49,   3
*Elset, elset=_m_Surf-Master_S4, internal, instance=AssemblyInstanceCon5, generate
  1,  58,   3
*Elset, elset=_m_Surf-Master_S4, internal, instance=AssemblyInstanceCon3, generate
  1,  58,   3
*Elset, elset=_m_Surf-Master_S4, internal, instance=AssemblyInstanceCow4, generate
  1,  49,   3
*Elset, elset=_m_Surf-Master_S4, internal, instance=AssemblyInstanceCon2, generate
  1,  58,   3
*Elset, elset=_m_Surf-Master_S4, internal, instance=AssemblyInstanceCon4, generate
  1,  58,   3
*Elset, elset=_m_Surf-Master_S4, internal, instance=AssemblyInstanceCow5, generate
  1,  49,   3
*Elset, elset=_m_Surf-Master_S4, internal, instance=AssemblyInstanceCow3, generate
  1,  49,   3
*Elset, elset=_m_Surf-Master_S2, internal, instance=AssemblyInstanceCow1, generate
  3,  51,   3
*Elset, elset=_m_Surf-Master_S2, internal, instance=AssemblyInstanceCow2, generate
  3,  51,   3
*Elset, elset=_m_Surf-Master_S2, internal, instance=AssemblyInstanceCow4, generate
  3,  51,   3
*Elset, elset=_m_Surf-Master_S2, internal, instance=AssemblyInstanceCow5, generate
  3,  51,   3
*Elset, elset=_m_Surf-Master_S2, internal, instance=AssemblyInstanceCow3, generate
  3,  51,   3
*Surface, type=ELEMENT, name=m_Surf-Master
_m_Surf-Master_S4, S4
_m_Surf-Master_S2, S2
*Elset, elset=_m_Surf-Slave_S2, internal, instance=AssemblyInstance-Con1, generate
  3,  60,   3
*Elset, elset=_m_Surf-Slave_S2, internal, instance=AssemblyInstanceIns1, generate
  3,  60,   3
*Elset, elset=_m_Surf-Slave_S2, internal, instance=AssemblyInstanceCon3, generate
  3,  60,   3
*Elset, elset=_m_Surf-Slave_S2, internal, instance=AssemblyInstanceIns3, generate
  1,  20,   1
*Elset, elset=_m_Surf-Slave_S2, internal, instance=AssemblyInstanceCon5, generate
  3,  60,   3
*Elset, elset=_m_Surf-Slave_S2, internal, instance=AssemblyInstanceIns5, generate
  1,  20,   1
*Elset, elset=_m_Surf-Slave_S2, internal, instance=AssemblyInstanceCon2, generate
  3,  60,   3
*Elset, elset=_m_Surf-Slave_S2, internal, instance=AssemblyInstanceIns2, generate
  3,  60,   3
*Elset, elset=_m_Surf-Slave_S2, internal, instance=AssemblyInstanceCon4, generate
  3,  60,   3
*Elset, elset=_m_Surf-Slave_S2, internal, instance=AssemblyInstanceIns4, generate
  1,  20,   1
*Elset, elset=_m_Surf-Slave_S4, internal, instance=AssemblyInstanceIns1, generate
  1,  58,   3
*Elset, elset=_m_Surf-Slave_S4, internal, instance=AssemblyInstanceIns3, generate
  1,  20,   1
*Elset, elset=_m_Surf-Slave_S4, internal, instance=AssemblyInstanceIns5, generate
  1,  20,   1
*Elset, elset=_m_Surf-Slave_S4, internal, instance=AssemblyInstanceIns2, generate
  1,  58,   3
*Elset, elset=_m_Surf-Slave_S4, internal, instance=AssemblyInstanceIns4, generate
  1,  20,   1
*Surface, type=ELEMENT, name=m_Surf-Slave
_m_Surf-Slave_S2, S2
_m_Surf-Slave_S4, S4
*End Assembly
**
** MATERIALS
**
*Material, name=Material-Con
*Density
1.,
*Elastic
 5e+11, 0.35
*Material, name=Material-Cow
*Density
1.,
*Elastic
 4.5e+11, 0.3
*Material, name=Material-Ins
*Density
1.,
*Elastic
 4e+11, 0.4
**
** INTERACTION PROPERTIES
**
*Surface Interaction, name=IntProp-1
1.,
*Friction, slip tolerance=0.005
 0.9,
*Surface Behavior, pressure-overclosure=HARD
**
** BOUNDARY CONDITIONS
**
** Name: BC-1 Type: Displacement/Rotation
*Boundary
Set-Bc, 2, 2
**
** INTERACTIONS
**
** Interaction: Int-1
*Contact Pair, interaction=IntProp-1, type=SURFACE TO SURFACE
m_Surf-Slave, m_Surf-Master
** ----------------------------------------------------------------
**
** STEP: Step-1-BodyForce
**
*Step, name=Step-1-BodyForce, nlgeom=NO
Description-Step-1-Body-Force
*Static
1., 1., 1e-05, 1.
**
** LOADS
**
** Name: Load-1-BodyForce   Type: Body force Using Field: AnalyticalField-1-BodyForce
*Dload
AssemblyInstance-Con1.1, BR, 1.57783e+09
AssemblyInstance-Con1.2, BR, 1.53599e+09
AssemblyInstance-Con1.3, BR, 1.49415e+09
AssemblyInstance-Con1.4, BR, 1.57783e+09
AssemblyInstance-Con1.5, BR, 1.53599e+09
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AssemblyInstanceIns4.20, BR, 9.66057e+07
**
** OUTPUT REQUESTS
**
*Restart, write, frequency=0
**
** FIELD OUTPUT: F-Output-1
**
*Output, field, variable=PRESELECT
**
** HISTORY OUTPUT: H-Output-1
**
*Output, history, variable=PRESELECT
*End Step
